Redirect        ieee37.dss
!Redirect       IEEELineCodes.DSS
Redirect       pvsystem.dss

!Solve Loadmult=0.5
Set Loadmult=1

Set VoltageBases = "230,4.8,0.48"
CalcVoltageBases
BusCoords IEEE37_BusXY.csv

New LoadShape.dispatch_shape interval=1 npts=24 mult=(file=curva_bess.txt)
New XYCurve.Eff npts=4 xarray=[.1        .2        .4        1.0]  yarray=[.86        .9        .93        .97]
New Storage.Storage_A3_nuevo phases=3 bus1=BESS_BUS kv=0.38 pf=1 kWrated=150 %reserve=20  // kv anterior kv=13.8 effcurve=Eff kWhrated=314 %stored=20 state=idling conn=delta dispmode=follow model=1 daily=dispatch_shape

new monitor.storage_ilhamento_potencia element=Line.L1 terminal=1 mode=1
new monitor.storage_ilhamento_VI element=Line.L1 terminal=1 mode=0
new monitor.storage_ilhamento_variables element=Line.L1 terminal=1 mode=3

new monitor.line_ilhamento_potencia element=Line.L1 terminal=1 mode=1
new monitor.line_ilhamento_VI element=Line.L1 terminal=1 mode=0
new monitor.line_ilhamento_variables element=Line.L1 terminal=1 mode=3

new monitor.pvsystem_ilhamento_potencia element=Line.L1 terminal=1 mode=1
new monitor.pvsystem_ilhamento_VI element=Line.L1 terminal=1 mode=0
new monitor.pvsystem_ilhamento_variables element=Line.L1 terminal=1 mode=3

set mode=daily
set number=24
Set Stepsize=1h

set DemandInterval=true
set overloadreport=true
set voltexceptionreport=true
set DIVerbose=true
solve
closeDI

Export Voltages pv_peak_voltages.csv
Export Overloads pv_peak_overloads.csv

Export monitor monitor_ilhamento_potencia
Export monitor monitor_ilhamento_VI
